# Расчёт элементов для MP2637
# Input Voltage Regulation in Charge Mode
# Ограничение тока заряда по просадке входного напряжения
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# При просадке входного напряжения, ИМС ограничивает ток заряда таким образом, чтобы поддерживать входное напряжение.
# V_REG := 1.2  V
# Пусть  R3 := 13  k
# R5 := 4.7  k
# из DataSheet:
# R3 = 15k R5 = 5.1k => V_IN_R = 4.7V
# Тогда пороговаое входное нпаряжение:
# V_IN_R := V_REG*(R3 + R5)/R5 = 4.51915V
# (минимальное напряжение питания 4.5V)
# Input over-voltage protection (OVP)
# Защита от пренапряжения
# Как только V_PWIN выйдет за установленный порог, ИМС разорвёт связь между VIN и SYS.
# V_PWIN_L := 0.8  V
# V_PWIN_H := 1.15  V
V_PWIN_nom := (V_PWIN_L + V_PWIN_H)/2 = 0.975
# Пусть  R4 := 22  k
# R6 := 5.1  k
# из DataSheet:
# R4 = 23.7k R6 = 5.1k =>
# V_IN_min = 4.5V
# V_IN_max = 6.5V
# Минимальное входное нпаряжение:
# V_INmin := V_PWIN_L*(R4 + R6)/R6 = 4.25098V
# Максимальное входное нпаряжение:
# Для наиболее широкого диапозона рабочего напрядения рекомендуется выбрать в качестве верхнего порога (V_(IN MAX)) максимальное входное напряжение 6V.
# V_INmax := V_PWIN_H*(R4 + R6)/R6 = 6.11078V
# (максимальное рабочее напряжение ИМС 6V)
V_IN := 6
V_PWIN := V_PWIN_H
# Номинальное входное нпаряжение:
# V_INnom := V_PWIN_nom*(R4 + R6)/R6 = 5.08696V
R4 := (V_IN - V_PWIN)/V_PWIN*R6 = 21.5087
# Input Current Limiting in Charge Mode
# Ограничение среднего входного тока
# Когда входной ток приближается к I_I_LIM, ток заряда уменьшается во избежание перегрузки источника питания.
# Пусть  R_ILIM := 18  k
# I_ILIM := 45/R_ILIM = 2.5A
# из DataSheet:
# R_ILIM = 90k => I_LIM = 0.5A (USB2.0)
# R_ILIM = 50k => I_LIM = 0.9A (USB3.0)
# (максимальный входной ток 2.7A; при R_ILIM_min 16.5 k)
# Charge Current Setting
# Настройка зарядного тока
# Ток на стадии быстрого заряда определяется резисторами RS1 и R_ISET.
# Спецификация рекомендует выбрать RS1 := 20  mΩ
# Пусть  R_ISET := 51  k
# I_CHG := 2400/(R_ISET*RS1) = 2.35294A
# (максимальный зарядный ток 2.5A; при RS1 20 mΩ и R_ISET 47.5 k)
# Timer Operation in Charge Mode
# Таймер заряда
# Если по истечении заданного временного интервала система остаётся в режиме предзаряда, процесс зарядки прекращается.
# Пусть  C_TMR := 0.1  uF | Ток предзаряда I_TC := 0.25  A
# из DataSheet:
# C_TMR = 0.1uF, RS1 = 20mΩ, I_CHG = 1A, I_TC = 100mA
# => τ_TC_TMR = 26.7min, τ_TOTAL_TMR = 336min
# Время предзаряда:
τ_TС_TMR := 4.5*10^4*1.6*C_TMR/(1.25*I_TC*RS1 + 2) = 872.727
# τ_TС_TMR/60 = 14.5455  min
# Общий таймаут заряда:
τ_TOTAL_TMR := 3.4*10^6*1.6*C_TMR/(1.25*I_CHG*RS1 + 2) = 8943.91
# τ_TOTAL_TMR/60 = 149.065  min
# τ_TOTAL_TMR/3600 = 2.48442  hr
# NTC Function in Charge Mode
# Контроль температуры аккумулятора в режиме заряда
# Внутренний резистивный делитель устанавливает пороговые значения на входе NTC: V_TL 66,6% и V_TH 33% от V_SYS.
# TL := 66.6  %
# TH := 33  %
# Пусть
# R_NTC_Cold := 27.445  k - сопротивление терморезистора в нижнем пределе рабочей температуры
# R_NTC_Hot := 4.1601  k - сопротивление терморезистора в верхнем пределе рабочей температуры
R_T1 := R_NTC_Hot*R_NTC_Cold*(TL - TH)/(TH*TL*(R_NTC_Cold - R_NTC_Hot)) = 0.0749624
# из DataSheet:
# Данные R_NTC_Cold и R_NTC_Hot указаны для датчика NCP18XH103 при 0 и 50 град.C соответственно
#
# При этом, расчёт должен показать
# R_T1 = 6.65k и R_T2 = 25.5k
R_T2 := R_NTC_Hot*R_NTC_Cold*(TL - TH)/((1 - TL)*TH*R_NTC_Cold - (1 - TH)*TL*R_NTC_Hot) = -0.0758947
# Вывести заново формулы R_T1 R_T2!
# Если подключение внешнего терморезистора не требуется, следует подобрать R_T1 и R_T2 таким образом, чтобы поддерживать V_NTC в пределах окна 33-66,6% от V_SYS.
# Например, R_T1 = R_T2 = 10k
# Setting the System Voltage in Boost Mode
# Установка выходного напряжения в режиме повышающего преобразователя
# Напряжение на выводе SYS не может быть установлено больше 6V (встроенная защита) или меньше 4.2V (максимальное напряжение на аккумаляторе.
# Пусть  V_SYS := 5  V
# R2 := 12  k
# из DataSheet:
# V_SYS = 5V => R1 = 31.6k, R2 = 10k
# R1 := R2*(V_SYS - 1.2)/1.2 = 38k
# Корректировка:
# R1 := 15  k
# R2 := 4.7  k
# На заметку:
# R2 = 6.8k, R1 = 27k => V_SYS = 5.96V
# R2 = 9.1k, R1 = 36k => V_SYS = 5.95V
# R2 = 5.1k, R1 = 20k => V_SYS = 5.91V
#
# R2 = 7.5k, R1 = 24k => V_SYS = 5.04V
# R2 = 4.7k, R1 = 15k => V_SYS = 5.04V
# R2 = 5.1k, R1 = 16k => V_SYS = 4.97V
#
# R2 = 6.8k, R1 = 18k => V_SYS = 4.38V
# Целые величины:
# R2 = 12k, R1 = 47k => V_SYS = 5.9V
# R2 = 12k, R1 = 43k => V_SYS = 5.5V
# R2 = 12k, R1 = 39k => V_SYS = 5.1V
# R2 = 12k, R1 = 36k => V_SYS = 4,8V
# R2 = 12k, R1 = 33k => V_SYS = 4,5V
# R2 = 12k, R1 = 30k => V_SYS = 4,2V
# V_SYS := 1.2*(R1 + R2)/R2 = 5.02979  V
# (при выключенном преобразователе, связь между SW и SYS отстутствует)
# Минимальное напряжения для запуска 2.9V. Преобразователь продолжает работать при снижении напряжения на аккумуляторе вплоть до 2.5V.
# Нагрузочная способность 2.4A.
# Boost Output Current Limiting
# Ограничение выходного тока в режиме повышающего преобразователя
# Если выходной ток достигнет установленный лимит, ток будет ограничен на этом уровне.
# Пусть  I_OLIM := 2.4  A
# R_OLIM := 2400/(I_OLIM*RS1) = 50k
# Корректировка:
# R_OLIM := 51  k
# из DataSheet:
# R_OLIM = 47.5k, RS1 = 20mR => I_OLIM = 2.5A
# I_OLIM := 2400/(R_OLIM*RS1) = 2.35294  A
# (максимальный выходной ток 2.4A)
# R_OLIM не может быть ниже 47.5k !
# SYS Output Over Current Protection
# Три ступени защиты от прегрузки по току:
# 1. Ограничение выходного тока в режиме повышающего преобразователя
# Когда выходной ток достигает предела, установленного R_OLIM, ток стабилизируется, для чего выходное напряжение будет снижено.
# 2. Режим понижения
# Когда V_SYS падает ниже V_BATT + 100mV, повышающий преобразователь переходит в режим понижения и отключается на 120uS
# 3. Защита от короткого замыкания
# Когда V_SYS падает ниже 3.75V, преобразователь немедленно отключается. Преобразователь восстановит работу через 1mS
# boost mode output current limit
# down mode
# short circuit mode
# Выбор индуктивности
# Пусть: | V_IN := 5  [V] | ΔI_L_max := I_CC*15/100  [MHz]
# V_BATT := 2.5  [V] | f_s := 1.5  [MHz]
# L := (V_IN - V_BATT)/ΔI_L_max*V_BATT/(V_IN*f_s)  [uH]
# Подбор терморезистора
# Пороговые значения на входе NTC: 32% и 74% от Vref.
# Для работы устройства необхедимо: 1,056 < Vntc < 2,442 [V]
# V_ref33 := 3.3  [V]
# Пусть:
# R_NTC_Cold := 27.445  [k] соотв. 0 С
V_TH_Low := V_ref33*74/100 = 2.442
# R_NTC_Hot := 4.1601  [k] соотв. 50 С
V_TH_High := V_ref33*32/100 = 1.056
# (значения указаны для терморезистора NCP18XH103)
# R_T2/R_NTC_Cold/(R_T1 + R_T2/R_NTC_Cold) == V_TH_Low/V_ref33  = 74 [%]
# R_T2/R_NTC_Hot/(R_T1 + R_T2/R_NTC_Hot) == V_TH_High/V_ref33  = 32 [%]
# Проверка значений из DataSheet
# Пусть: | R_T1 := 8.7  [k]
# R_T2 := 252.3  [k]
# Тогда:
R_T2/R_NTC_Cold/(R_T1 + R_T2/R_NTC_Cold) = 0.513774
V_TH_Low/V_ref33 = 0.74
# Когда Rntc не подключён
R_T2/R_NTC_Hot/(R_T1 + R_T2/R_NTC_Hot) = 0.874545
V_TH_High/V_ref33 = 0.32
# Пусть: | R_T1 := 8.2  [k]
# V_NTC := (V_TH_Low + V_TH_High)/2 = 1.749  [V]
# Тогда: | R_T2 := R_T1*V_NTC/(V_ref33 - V_NTC) = 9.24681  [k]
# Проверка: | R_T2 := 10  [k]
V_NTC := V_ref33*R_T2/(R_T1 + R_T2) = 1.81319
# Выбор выходного конденсатора
# Пусть: | V_INmax := 6  [V] | Δr_Omax := 0.1  [%]
# V_INmin := 3  [V]
# C_o := (1 - V_INmin/V_INmax)/(8*f_s^2*L*Δr_Omax)  [uF]
