# Расчёт элементов для MP2611
# Времянные интервалы
# Пусть  C_TMR := 0.1  uF
# Таймер предзаряда:
# t_Trickle := 30*C_TMR/0.1 = 30  [min]
# Общее время заряда:
# t_Total := 3*C_TMR/0.1 = 3  [hours]
# Ток быстрого заряда аккумулятора
# Пусть  R_Sense := 50  mR | Мощность рассеивания:
# I_CC := 100/R_Sense = 2  [A] | P_Rsens := 100*I_CC = 200  [мВт]
# (не более 1/4W на резистор для 1206)
# Огранечение тока через USB
# Пусть  R_USB_LIM := 75  [k], не менее 18,5k
# I_USB := 37000/R_USB_LIM = 493.333  [mA]
I_USB := 500  # R_USB_LIM := 37000/I_USB = 74  [k]
# Выбор индуктивности
# Пусть: | V_IN := 5  [V] | ΔI_L_max := I_CC*15/100 = 0.3  [MHz]
# V_BATT := 2.5  [V] | f_s := 1.5  [MHz]
# L := (V_IN - V_BATT)/ΔI_L_max*V_BATT/(V_IN*f_s) = 2.77778  [uH]
# Подбор терморезистора
# Пороговые значения на входе NTC: 32% и 74% от Vref.
# Для работы устройства необхедимо: 1,056 < Vntc < 2,442 [V]
# V_ref33 := 3.3  [V]
# Пусть:
# R_NTC_Cold := 27.445  [k] соотв. 0 С
V_TH_Low := V_ref33*74/100 = 2.442
# R_NTC_Hot := 4.1601  [k] соотв. 50 С
V_TH_High := V_ref33*32/100 = 1.056
# (значения указаны для терморезистора NCP18XH103)
# R_T2/R_NTC_Cold/(R_T1 + R_T2/R_NTC_Cold) == V_TH_Low/V_ref33  = 74 [%]
# R_T2/R_NTC_Hot/(R_T1 + R_T2/R_NTC_Hot) == V_TH_High/V_ref33  = 32 [%]
# Проверка значений из DataSheet
# Пусть: | R_T1 := 8.7  [k]
# R_T2 := 252.3  [k]
# Тогда:
R_T2/R_NTC_Cold/(R_T1 + R_T2/R_NTC_Cold) = 0.513774
V_TH_Low/V_ref33 = 0.74
# Когда Rntc не подключён
R_T2/R_NTC_Hot/(R_T1 + R_T2/R_NTC_Hot) = 0.874545
V_TH_High/V_ref33 = 0.32
# Пусть: | R_T1 := 8.2  [k]
# V_NTC := (V_TH_Low + V_TH_High)/2 = 1.749  [V]
# Тогда: | R_T2 := R_T1*V_NTC/(V_ref33 - V_NTC) = 9.24681  [k]
# Проверка: | R_T2 := 10  [k]
V_NTC := V_ref33*R_T2/(R_T1 + R_T2) = 1.81319
# Выбор выходного конденсатора
# Пусть: | V_INmax := 6  [V] | Δr_Omax := 0.1  [%]
# V_INmin := 3  [V]
# C_o := (1 - V_INmin/V_INmax)/(8*f_s^2*L*Δr_Omax) = 0.1  [uF]
